// SBML level 3 version 1

model main()

  // Compartments:
  compartment comp1 = 1;

  // Species:
  species IFNb_mRNA in comp1 = 0;
  species IFNb_env in comp1 = 0;
  species STATP2n in comp1 = 0;
  species IRF7m in comp1 = 0;

  // Parameters:
  KK3 = 0.0043;
  KK2 = 0.002;
  b4 = 0.2;
  b1 = 0.4;
  k11 = 0.00036;
  vmax2 = 20*3600;
  NA = 6.02e23;
  ts = 0;
  k3 = ln(2)/tao3;
  k5 = 3600;
  k4 = ln(2)/tao6;
  te = 10;
  C = 500000;
  r4 = k11;
  r0 = 0.003;
  r1 = r0;
  r2 = 1e9*C*vmax2/NA;
  r3 = TJtot*k5;
  TJtot = 0.0001;
  tao6 = 1;
  tao3 = 0.56;
  tao1 = 2.5;
  k1 = ln(2)/tao1;

  // Assignment rules:
  myf := exp(-b1*t);
  myfs := exp(-b4*t);
  t := time;

  // Rate rules:
  IFNb_mRNA' = r1*myf - k1*IFNb_mRNA;
  IFNb_env' = r2*IFNb_mRNA/(KK2 + IFNb_mRNA);
  STATP2n' = r3*IFNb_env/(KK3 + IFNb_env) - k3*STATP2n;
  IRF7m' = r4*STATP2n*myfs - k4*IRF7m;
end
